! Arquivo Monitors
New monitor.Monitor_Barra_SE-99 element=line.Trecho_99-1 terminal=1 mode=1 ppolar=no
New monitor.SFV_Novo element=PVSystem.SFV_1 terminal=1 mode=3 ppolar=no
New monitor.SA element=Storage.SA_1 terminal=1 mode=1 ppolar=no
